// SBML level 3 version 2

model __main()
  // Mothes2020_NFkB_A20_signaling
  // The Mothes2020_NFkB_A20_signaling model is based on our previous model published in Murakawa et al., Nat Commun, 2015 (doi: 10.1038/ncomms8367). In the Mothes2020_NFkB_A20_signaling model, we removed the modulating impact of the component RC3H1 (RNA-binding protein ROQUIN) which can alter the degradation rates of A20_mRNA and IkBa_mRNA. The Mothes2020_NFkB_A20_signaling model therefore represents the wild type condition of the Murakawa model and shows identical dynamics of the included components A20, A20_mRNA, IkBa, IkBa_mRNA, NFkB, NFkB_IkBa and IKK_active.
  // hasProperty mamo:MAMO_0000046
  // isDescribedBy pubmed:32848849
  // model units - substance: substance, time: time, volume: volume, area: area, length: length

  // Compartments:
  compartment default_compartment = 1;

  // Species:
  species A20_mRNA in default_compartment = 2.604408/default_compartment;
  species NFkB in default_compartment = 0.007905172/default_compartment;
  species A20 in default_compartment = 0.3028141/default_compartment;
  species IkBa in default_compartment = 0.7343461/default_compartment;
  species IkBa_mRNA in default_compartment = 0.03241289/default_compartment;
  species NFkB_IkBa in default_compartment = k12;
  species IKK_active in default_compartment = 0.01744865/default_compartment;

  // Parameters:
  k10 = 0.0987513376 _1_inv_minute;
  k6 = 0.0002997404 _1_inv_item_minute;
  k8 = 0.0999074296 _1_inv_minute;
  k3 = 0.8592722 _1_inv_minute;
  k9 = 0.1295181 _1_inv_minute;
  k4 = 0.005501404 _1_inv_minute;
  k1 = 9727.709 _1_inv_item_minute;
  k2 = 39.28435 _1_inv_minute;
  k11 = 0.0015859262 _1_inv_minute;
  k7 = 0.0003867911 _1_inv_item_minute;
  k5 = 0.0063041259 _1_inv_item_minute;
  k14 = 0.0011844016 item;
  k15 = 0.223288108 _1_inv_minute;
  stimulus = 1 dimensionless;
  k13 = 12.65705 _1_inv_minute;
  k12 = 1.445386 item;
  IkBa_tot has item;

  // Assignment rules:
  IkBa_tot := NFkB_IkBa + IkBa;

  // Reactions:
  J1: -> A20_mRNA; k10*NFkB - k6*A20_mRNA;  // modifiers: NFkB
  J2: -> A20; k8*A20_mRNA - k3*A20;  // modifiers: A20_mRNA
  J3: -> IkBa; k9*IkBa_mRNA - k4*IkBa - k1*IkBa*NFkB + k2*NFkB_IkBa;  // modifiers: NFkB, IkBa_mRNA, NFkB_IkBa
  J4: -> IkBa_mRNA; k11*NFkB - k7*IkBa_mRNA;  // modifiers: NFkB
  J5: -> NFkB_IkBa; k1*IkBa*NFkB - k2*NFkB_IkBa - k5*NFkB_IkBa*IKK_active;  // modifiers: NFkB, IkBa, IKK_active
  J6: -> NFkB; -k1*IkBa*NFkB + k2*NFkB_IkBa + k5*NFkB_IkBa*IKK_active;  // modifiers: IkBa, NFkB_IkBa, IKK_active
  J7: -> IKK_active; k14/(k14 + A20) - k15*IKK_active + stimulus*k13*exp(-A20);  // modifiers: A20

  // Unit definitions:
  unit minute = 60 second;
  unit time = 60 second;
  unit _1_inv_item_minute = 1 / (item * 60 second);
  unit _1_inv_minute = 1 / (60 second);
  unit volume = dimensionless;
  unit substance = item;
  unit area = dimensionless;
  unit length = dimensionless;
end
